// COMSOL Multiphysics 6.1.0.357 model "CTuring_Hex_1_AC_fine.mph"
// Outline of the model tree

Parameters
  Ca_0 = 0.001 [uM]
  D_Ca = 100 [um^2/s]
  CaM_0 = 0.0029 [mol/m^3]
  D_CaM = 10 [um^2/s]
  Ca2CaM_0 = 0.0001 [mol/m^3]
  D_Ca2CaM = 10 [um^2/s]
  Ca3CaM_0 = 4E-6 [mol/m^3]
  D_Ca3CaM = 10 [um^2/s]
  Ca4CaM_0 = 1E-5 [mol/m^3]
  D_Ca4CaM = 10 [um^2/s]
  kf10 = 3.6 [1/s/uM]
  kr10 = 8 [1/s]
  kf11 = 11 [1/s/uM]
  kr11 = 195 [1/s]
  kf12 = 59 [1/s/uM]
  kr12 = 500 [1/s]
  D_AC = 0 [um^2/s]
  D_CaMAC = 0 [um^2/s]
  kf13 = 1.7 [1/uM/s]
  kr13 = 10 [1/s]
  D_ACact = 0 [um^2/s]
  kcat14 = 60 [1/s]
  km14 = 1 [uM]
  kr14 = 10 [1/s]
  PDE1_0 = 0.9 [uM]
  D_PDE1 = 10 [um^2/s]
  CaMPDE1_0 = 1E-6 [mol/m^3]
  D_CaMPDE1 = 10 [um^2/s]
  PDE1act_0 = 1E-6 [mol/m^3]
  D_PDE1act = 10 [um^2/s]
  kf15 = 25 [1/uM/s]
  kr15 = 1 [1/s]
  kcat16 = 20 [1/s]
  km16 = 1 [uM]
  kr16 = 1 [1/s]
  kf17 = 435 [1/uM/s]
  kr17 = 1 [1/s]
  cAMP_0 = 4E-6 [uM]
  D_cAMP = 60[um^2/s]
  kb18 = 0.1 [1/s]
  ka18 = 0.785 [1/s]
  kb19 = 2 [1/s]
  ka19 = 20 [1/s]
  km19 = 0.6 [uM]
  kind20 = 2.5 [uM/s]
  km20 = 1.4 [uM]
  R2_0 = 0.04 [uM]
  D_R2 = 10 [um^2/s]
  kf21 = 20 [1/min/uM^2]
  kr21 = 12 [1/min/uM]
  kf22 = 1 [1/uM/s]
  kr22 = 0.00105 [1/s]
  kf23 = 1 [1/s/uM]
  kr23 = 0.00132 [1/s]
  kf24 = 1 [1/uM/s]
  kr24 = 0.0013 [1/s]
  kf25 = 1 [1/s/uM]
  kr25 = 0.00103 [1/s]
  kf26 = 1 [1/s/uM]
  kr26 = 0.0114 [1/s]
  PKA_0 = 0.05 [uM]
  D_PKA = 0.01[um^2/s]
  R2C_0 = 0 [uM]
  D_R2C = 10 [um^2/s]
  kf27 = 1 [1/uM/s]
  kr27 = 1.26e-7 [1/s]
  kf28 = 1 [1/uM/s]
  kr28 = 2.52e-7 [1/s]
  kf29 = 1 [1/uM/s]
  kr29 = 3.4e-6 [1/s]
  kf30 = 1 [1/uM/s]
  kr30 = 0.000936 [1/s]
  kf31 = 1 [1/uM/s]
  kr31 = 0.645 [1/s]
  kf32 = 1 [1/uM/s]
  kr32 = 0.000659 [1/s]
  kf33 = 1 [1/uM/s]
  kr33 = 0.0142 [1/s]
  kf34 = 1 [1/uM/s]
  kr34 = 0.358 [1/s]
  kf35 = 1 [1/uM/s]
  kr35 = 7.84 [1/s]
  kf36 = 1 [1/uM/s]
  kr36 = 0.00324 [1/s]
  kf37 = 1 [1/uM/s]
  kr37 = 2.81e-6 [1/s]
  R2C2_0 = 0.2[uM]
  D_R2C2 = 10 [um^2/s]
  kf38 = 1 [1/uM/s]
  kr38 = 0.666 [1/s]
  kf39 = 1 [1/uM/s]
  kr39 = 0.762 [1/s]
  kf40 = 1 [1/s/uM]
  kr40 = 2.91 [1/s]
  v1 = -20 [mV]
  v2 = 24 [mV]
  v3 = -16 [mV]
  v4 = 11.2 [mV]
  g_K = 260 [pS]
  g_Ca = 600 [pS]
  g_L = 150 [pS]
  g_KCa = 2000 [pS]
  E_K = -75 [mV]
  E_Ca = 100 [mV]
  E_L = -75 [mV]
  K_KCa = 5 [umol/l]
  Cm = 5.3 [pF]
  phi = 35 [1/s]
  fi = 1e-6
  v_LPM = 150 [1/s]
  A = 0.2869 [l/umol]
  B = 2.869 [l^2/umol^2]
  C = 0.2133
  Ca_stores = 1.56 [umol/l]
  k_IP3R = 0.05 [l/umol/s]
  Vs = 0.1 [umol/l/s]
  Ks = 10 [umol/l]
  k_PKAV = 100 [l/umol]
  V_0 = -60 [mV]
  D_V = 1 [um^2/s]
  w_0 = 0
  D_w = 0 [um^2/s]
  alpha_mod = 414600[mol/(m^2*s*A)]
  v_LPM_mod = 150*5e-6[m/s]
  D_VGCC = 0 [um^2/s]
  indrat = 75
  vAC = 2.0
  bAC = 4.0
  bPDE = 0.01
  vPDE = 0.3
  vPDEind = 0.1
  angle = 60 [deg]
  kA = 1 [1/s/uM]
  krA = 0.1[1/s]
  kAC = 1.5
  kPDE = 3
  aAC8 = 15
  aPDE = 120
  c1x = -1.5*1E-7
  c1y = -1.3*1E-7
  c2x = 0
  c2y = 1.4*1E-7
  c3x = 1.5*1E-7
  c3y = -1.4*1E-7
  c4x = 2.6E-7
  c4y = 1.4E-7
  c5x = -2.6E-7
  c5y = 1.4E-7
  c6x = 0
  c6y = -4E-7
  c7x = 1.5E-7
  c7y = 4.1*1E-7
  c8x = -c7x
  c8y = c7y
  ratio = 1

Functions
  int1: Interpolation (disabled) | source = file; filename = /Users/administrator/Downloads/test.txt; nargs = 2; fununit = mol/m^2; argunit = {um, um}
  gp1: GaussianPulse | sigma = 25
  an1: Analytic | expr = an2(x,y)+an3(x,y)+an4(x,y)+an5(x,y)+an6(x,y)+an7(x,y); args = {x, y}
  an2: Analytic | expr = gp1(sqrt(((x - c1x)*1E9)^2+((y - c1y)*1E9)^2)); args = {x, y}
  an3: Analytic | expr = gp1(sqrt(((x - c2x)*1E9)^2+((y - c2y)*1E9)^2)); args = {x, y}
  an4: Analytic | expr = gp1(sqrt(((x - c3x)*1E9)^2+((y - c3y)*1E9)^2)); args = {x, y}
  an5: Analytic | expr = gp1(sqrt(((x - c4x)*1E9)^2+((y - c4y)*1E9)^2)); args = {x, y}
  an6: Analytic | expr = gp1(sqrt(((x - c5x)*1E9)^2+((y - c5y)*1E9)^2)); args = {x, y}
  an7: Analytic | expr = gp1(sqrt(((x - c6x)*1E9)^2+((y - c6y)*1E9)^2)); args = {x, y}
  an8: Analytic | expr = gp1(sqrt(((x - c7x)*1E9)^2+((y - c7y)*1E9)^2)); args = {x, y}
  an9: Analytic | expr = gp1(sqrt(((x - c8x)*1E9)^2+((y - c8y)*1E9)^2)); args = {x, y}
  int2: Interpolation "AC_interp" | importedname = Data_R.txt; source = file; filename = /Users/group/Documents/postdoc/Prof_Padmini_Rangamani/AKAP/Turing/PRL_Hex/Data_R.txt; nargs = 2
  int3: Interpolation "AKAP_interp" | source = file; filename = /Users/group/Documents/postdoc/Prof_Padmini_Rangamani/AKAP/Turing/PRL_Hex/Data_S.txt; nargs = 2

Variables
  var1 "sources"
    f_Ca = -2*j_10-j_11-j_12-2*j_16
    f_CaM = -j_10
    f_Ca2CaM = j_10-j_11-j_15
    f_Ca3CaM = j_11-j_12
    f_Ca4CaM = j_12-j_17
    f_AC = -j_13
    f_CaMAC = j_13-j_14
    f_ACact = j_14
    f_PDE1 = -j_15-j_17
    f_CaMPDE1 = j_15-j_16
    f_PDE1act = j_16+j_17
    f_cAMP = -j_19-j_20-2*j_21-2*j_22
    f_R2 = j_22
    f_PKA = j_21+j_22
    f_R2C = j_21-j_22
    f_R2C2 = -j_21
    f_V = j_V
    f_w = j_w
    f_AKAP = -j_A-j_B-j_C
    f_AKAPR2 = j_C+j_C22
    f_AKAPR2C = j_B21-j_C22+j_B
    f_AKAPR2C2 = j_A-j_B21
  var2 "fluxes"
    j_10 = kf10*Ca*CaM-kr10*Ca2CaM
    j_11 = kf11*Ca*Ca2CaM-kr11*Ca3CaM
    j_12 = kf12*Ca*Ca3CaM-kr12*Ca4CaM
    j_13 = bAC*kf13*AC*Ca2CaM-kr13*CaMAC
    j_14 = kAC*kcat14*Ca*CaMAC/(Ca+km14)-kr14*ACact
    j_15 = bPDE*kf15*PDE1*Ca2CaM-kr15*CaMPDE1
    j_16 = kPDE*kcat16*Ca*CaMPDE1/(Ca+km16)-kr16*PDE1act
    j_17 = bPDE*kf15*PDE1*Ca4CaM-0.1*kr15*PDE1act
    j_18 = vAC*(kb18*(CaMAC+AC+indrat*ACind)+aAC8*ka18*ACact)
    j_19 = vPDE*(kb19*cAMP*(CaMPDE1+PDE1)/(cAMP+km19)+aPDE*ka19*(cAMP*PDE1act)/(cAMP+km19))
    j_20 = vPDEind*kind20*cAMP/(cAMP+km20)
    j_21 = 100*(kf21*cAMP^2*R2C2-kr21*R2C*PKA)
    j_22 = 100*(kf21*cAMP^2*R2C-kr21*R2*PKA)
    j_CaV = fi*(-alpha_mod*I_Ca/10-v_LPM_mod*Ca)*10
    j_CaI = C*k_IP3R*PKA*(A*Ca/(1+A*Ca+B*Ca^2))*(Ca_stores-Ca)-Vs*(Ca^2/(Ks^2+Ca^2))
    j_totCa = j_CaV*(1+k_PKAV*PKA)
    j_V = (-I_Ca-I_K-I_L-I_KCa)/Cm
    j_w = phi*(w_inf-w)/tau
    j_totCai = j_CaI
    j_A = kA*AKAP*R2C2-krA*AKAPR2C2
    j_B = kA*AKAP*R2C-krA*AKAPR2C
    j_C = kA*AKAP*R2-krA*AKAPR2
    j_C22 = 100*(kf21*cAMP^2*AKAPR2C-kr21*AKAPR2*PKA)
    j_B21 = 100*(kf21*cAMP^2*AKAPR2C2-kr21*AKAPR2C*PKA)
  var3 "currents" on boundaries 4
    I_Ca = g_Ca*m_inf*(V-E_Ca)
    m_inf = 0.5*(1+tanh((V-v1)/v2))
    w_inf = 0.5*(1+tanh((V-v3)/v4))
    tau = 1/cosh((V-v3)/(2*v4))
    I_K = g_K*w*(V-E_K)
    I_L = g_L*(V-E_L)
    I_KCa = g_KCa*(Ca/(Ca+K_KCa))*(V-E_K)
  var4 "BC"
    bc_Ca = j_totCa / 1 [mol/(m^2)] * VGCC - 2*j_14
    bc_Ca2CaM = -j_13
    bc_cAMP = j_18

Selections
  sel1: Explicit "surface" on no boundaries
  sel2: Explicit "small cube" on no boundaries
  sel3: Explicit "big cube" on no boundaries

Geometry
  geom1 "Geometry 1" (3D, length unit m)
    blk1: Block (disabled) | base = center; size = {0.4e-6 [m], 0.4e-6 [m], 0.6e-6 [m]}
    blk2: Block (disabled) | base = center; size = {1.5e-6, 1.5e-6, 1.5e-6}
    sph1: Sphere (disabled) | r = 3.8e-6
    pt1: Point | p = {, , 0}
    pt2: Point | p = {0, 0, 0.3e-6 [m]}
    pt3: Point (disabled) | p = {0, 0, 0}
    wp1: WorkPlane | quickz = 0.3E-6*2; unite = on
      pol1: Polygon
        source = table
        table = 
          {0, 1*0.2E-6*2}
          {sin(angle)*0.2E-6*2, cos(angle)*0.2E-6*2}
          {sin(2*angle)*0.2E-6*2, cos(2*angle)*0.2E-6*2}
          {sin(3*angle)*0.2E-6*2, cos(3*angle)*0.2E-6*2}
          {sin(4*angle)*0.2E-6*2, cos(4*angle)*0.2E-6*2}
          {sin(5*angle)*0.2E-6*2, cos(5*angle)*0.2E-6*2}
          {0, 1*0.2E-6*2}
    ext1: Extrude | workplane = wp1; input = wp1; distance = -0.6E-6*2
    fin: Finalize "Form Union"

Physics
  g: GeneralFormPDE on domains 1
    dependent variable u2 = {Ca, CaM, Ca2CaM, Ca3CaM, Ca4CaM, PDE1, CaMPDE1, PDE1act, cAMP, R2, PKA, R2C, R2C2}
    Units.DependentVariableQuantity = concentration
    Units.SourceTermQuantity = reactionrate
    gfeq1: GeneralFormPDE "General Form cyto" (default)
      f = {f_Ca+j_totCai, f_CaM, f_Ca2CaM, f_Ca3CaM, f_Ca4CaM, f_PDE1, f_CaMPDE1, f_PDE1act, f_cAMP, f_R2, f_PKA, f_R2C, f_R2C2}
      Ga = 
        {-D_Ca*Cax, -D_Ca*Cay, -D_Ca*Caz}
        {-D_CaM*CaMx, -D_CaM*CaMy, -D_CaM*CaMz}
        {-D_Ca2CaM*Ca2CaMx, -D_Ca2CaM*Ca2CaMy, -D_Ca2CaM*Ca2CaMz}
        {-D_Ca3CaM*Ca3CaMx, -D_Ca3CaM*Ca3CaMy, -D_Ca3CaM*Ca3CaMz}
        {-D_Ca4CaM*Ca4CaMx, -D_Ca4CaM*Ca4CaMy, -D_Ca4CaM*Ca4CaMz}
        {-D_PDE1*PDE1x, -D_PDE1*PDE1y, -D_PDE1*PDE1z}
        {-D_CaMPDE1*CaMPDE1x, -D_CaMPDE1*CaMPDE1y, -D_CaMPDE1*CaMPDE1z}
        {-D_PDE1act*PDE1actx, -D_PDE1act*PDE1acty, -D_PDE1act*PDE1actz}
        {-D_cAMP*cAMPx, -D_cAMP*cAMPy, -D_cAMP*cAMPz}
        {-D_R2*R2x, -D_R2*R2y, -D_R2*R2z}
        {-D_PKA*PKAx, -D_PKA*PKAy, -D_PKA*PKAz}
        {-D_R2C*R2Cx, -D_R2C*R2Cy, -D_R2C*R2Cz}
        {-D_R2C2*R2C2x, -D_R2C2*R2C2y, -D_R2C2*R2C2z}
      da = {1, 0, 0, 0, 0, 0, 0, 0, 0, 0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}
    zflx1: ZeroFluxBoundary "Zero Flux 1" (default)
    init1: init "Initial Values 1" (default)
      Ca = Ca_0
      CaM = CaM_0
      Ca2CaM = Ca2CaM_0
      Ca3CaM = Ca3CaM_0
      Ca4CaM = Ca4CaM_0
      PDE1 = PDE1_0
      CaMPDE1 = CaMPDE1_0
      PDE1act = PDE1act_0
      cAMP = cAMP_0
      R2 = R2_0
      PKA = PKA_0
      R2C = R2C_0
      R2C2 = R2C2_0
      R2b = R2b_0
      R2ba = R2ba_0
      R2bb = R2bb_0
      R2bba = R2bba_0
      R2bbaa = R2bbaa_0
      R2bC = R2bC_0
      R2baC = R2baC_0
      R2bbaC = R2bbaC_0
      R2bbaaC = R2bbaaC_0
      R2bC2 = R2bC2_0
      R2baC2 = R2baC2_0
    flux1: FluxBoundary "PM flux" on boundaries 4
      g = {bc_Ca, 0, bc_Ca2CaM, 0, 0, 0, 0, 0, bc_cAMP-2*(j_B21+j_C22), -j_C, j_B21+j_C22, -j_B, -j_A}
    pc1: PeriodicCondition on boundaries 2, 7 | destinationDomains: boundaries 7
    pc2: PeriodicCondition on boundaries 1, 8 | destinationDomains: boundaries 8
    pc3: PeriodicCondition on boundaries 5, 6 | destinationDomains: boundaries 6
  gb: GeneralFormBoundaryPDE "General Form Boundary membrane" on boundaries 4
    dependent variable u = {AC, CaMAC, ACact, VGCC, ACind, AKAP, AKAPR2, AKAPR2C, AKAPR2C2}
    Units.DependentVariableQuantity = surfaceconcentration
    Units.SourceTermQuantity = molarflux
    gfeq1: GeneralFormPDE (default)
      f = {f_AC, f_CaMAC, f_ACact, 0, 0, f_AKAP, f_AKAPR2, f_AKAPR2C, f_AKAPR2C2}
      Ga = 
        {0, 0, 0}
        {0, 0, 0}
        {0, 0, 0}
        {-D_VGCC*VGCCTx, -D_VGCC*VGCCTy, -D_VGCC*VGCCTz}
        {-1[um^2/s]*ACindTx, -1[um^2/s]*ACindTy, -1[um^2/s]*ACindTz}
        {0, 0, 0}
        {0, 0, 0}
        {0, 0, 0}
        {0, 0, 0}
      da = {1, 0, 0, 0, 0, 0, 0, 0, 0, 0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}
    init1: init "Initial Values 1" (default)
      CaMAC = 0
      AC = int2(x,y)/0.435*16e-09[mol/m^2]*ratio
      ACact = 0
      VGCC = 1
      ACind = 1 [uM] * 0.4e-6 [m]
      AKAP = int3(x,y)/0.151*16e-09[mol/m^2]
  gb2: GeneralFormBoundaryPDE "General Form Boundary V" on boundaries 4
    dependent variable V
    Units.DependentVariableQuantity = electricpotential
    Units.CustomDependentVariableUnit = V
    Units.SourceTermQuantity = none
    Units.CustomSourceTermUnit = V/s
    gfeq1: GeneralFormPDE (default) | f = f_V; Ga = {-D_V*VTx, -D_V*VTy, -D_V*VTz}; da = 1
    init1: init "Initial Values 1" (default) | V = V_0
  gb3: GeneralFormBoundaryPDE "General Form Boundary w" on boundaries 4
    dependent variable w
    Units.SourceTermQuantity = none
    Units.CustomSourceTermUnit = 1/s
    gfeq1: GeneralFormPDE (default) | f = f_w; Ga = {-D_w*wTx, -D_w*wTy, -D_w*wTz}; da = 1
    init1: init "Initial Values 1" (default) | w = w_0

Mesh
  mesh1 "Mesh 1"
    size: MeshSizeDefault | hmax = 1.2E-7; hmin = 2.16E-8
    size1: Size on boundaries 4 | hmax = 4.2E-8; hmin = 1.8E-9; hauto = 2
    bl1: BndLayer "Boundary Layers 1" on domains 1
      blp: BndLayerProp "Boundary Layer Properties" on boundaries 4 | blnlayers = 5

Studies
  std1 "Study 1"
    param: Parametric "Parametric Sweep" | pname = ratio; plistarr = 0.125,0.25,1
    time: Transient "Time Dependent" | tlist = range(0,0.5,1200)

Solver configurations
  sol1 "Solution 1" (study std1)
    v1: Variables "Dependent Variables 1"
    t1: Time "Time-Dependent Solver 1" | tlist = range(0,0.5,1200); tstepsbdf = intermediate
      dDef: Direct
      se1: Segregated
        ss1: SegregatedStep "General Form PDE"
          segvar = {comp1_Ca, comp1_CaM, comp1_Ca2CaM, comp1_Ca3CaM, comp1_Ca4CaM, comp1_PDE1, comp1_CaMPDE1, comp1_PDE1act, comp1_cAMP, comp1_R2, comp1_PKA, comp1_R2C, comp1_R2C2}
          linsolver = dDef
        ss2: SegregatedStep "Merged variables"
          segvar = {comp1_AC, comp1_CaMAC, comp1_ACact, comp1_VGCC, comp1_ACind, comp1_AKAP, comp1_AKAPR2, comp1_AKAPR2C, comp1_AKAPR2C2, comp1_V, comp1_w}
          linsolver = dDef
  sol2 "Parametric Solutions 1" (study std1)

Datasets
  dset1: Solution | solution = sol1
  surf1: Surface on boundaries 4 | data = dset2
  cln1: CutLine2D "Line" | data = surf1; genpoints = {{0, 9E-8}, {1.2E-7, -1.75E-7}}
  cpt1: CutPoint3D "Origin" | data = dset2; pointx = 0; pointy = 9E-8; pointz = 6*1E-7
  cpt2: CutPoint3D "Boundary" | data = dset2; pointx = 1.2E-7; pointy = -1.75E-7; pointz = 6E-7; snapping = boundary
  dset2: Solution | solution = sol2

Tables
  tbl1: Table "Time-Dependent Solver 1"
    Time step | Reciprocal of step size
    1 | 16.2051
    2 | 16.2051
    3 | 32.4101
    4 | 64.8202
    5 | 32.4101
    6 | 129.64
    7 | 64.8202
    8 | 132.907
    9 | 265.814
    10 | 132.907
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  tbl2: Table "Segregated solver"
    Iteration number | Error: Segregated Step 1 | Error: Segregated Step 2 | Error: Segregated Step 1a | Error: Segregated Step 2a
    1 | 2.93857e-07 | 0.000236837 | 0 | 0
    nan | nan | nan | nan | nan
    1 | 4.90572e-08 | 5.46548e-06 | 0 | 0
    nan | nan | nan | nan | nan
    1 | 0.000114553 | 0.0865866 | 0 | 0
    2 | 1.42081e-05 | 0.00182681 | 0 | 0
    nan | nan | nan | nan | nan
    2 | 0.000118952 | 0.141604 | 0 | 0
    3 | 9.86915e-05 | 0.102131 | 0 | 0
    4 | 4.95648e-05 | 0.00441463 | 0 | 0
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
Plots
  pg1: PlotGroup3D "General Form PDE" | data = dset1
    slc1: Slice | expr = AKAP
  pg2: PlotGroup3D "General Form Boundary membrane" | data = dset1
    surf1: Surface | expr = AC
  pg3: PlotGroup3D "General Form Boundary V" | data = dset1
    surf1: Surface | expr = V
  pg4: PlotGroup3D "General Form Boundary w" | data = dset1
    surf1: Surface | expr = w
  pg5: PlotGroup1D "Origin" | data = cpt1
    ptgr1: PointGraph | expr = Ca; unit = uM
    ptgr2: PointGraph | expr = cAMP*1E4
  pg6: PlotGroup2D "2D Plot Group 6" | data = surf1
    surf1: Surface | expr = AC
  pg7: PlotGroup3D "3D Plot Group 7" | data = dset1
    surf1: Surface | expr = cAMP
  pg8: PlotGroup1D "Boundary" | data = cpt2
    ptgr2: PointGraph | expr = cAMP; unit = uM
    ptgr3: PointGraph | expr = Ca*100

Exports
  data2: Data "Line_1"
    data = cln1
    expr = {Ca, cAMP, PDE1act, ACact, PKA}
    unit = {mol/m^3, mol/m^3, mol/m^3, mol/m^2, mol/m^3}
    descr = {, Dependent variable cAMP, Dependent variable PDE1act, Dependent variable ACact, Dependent variable PKA}
    filename = /Users/group/Documents/postdoc/Prof_Padmini_Rangamani/AKAP/Comsol_Data_used/CTuring_1.txt
    location = regulargrid
    gridx1 = 100
    regulargridx1 = 100
  data3: Data "Line_0_25"
    data = cln1
    expr = {Ca, cAMP, PDE1act, ACact, PKA}
    filename = /Users/group/Documents/postdoc/Prof_Padmini_Rangamani/AKAP/Comsol_Data_used/CTuring_0_25.txt
  data4: Data "Line_0_125"
    data = cln1
    expr = {Ca, cAMP, PDE1act, ACact, PKA}
    filename = /Users/group/Documents/postdoc/Prof_Padmini_Rangamani/AKAP/Comsol_Data_used/CTuring_0_125.txt